Given
σxx == Q11(θ)*εxx + Q12(θ)*εyy + Q16(θ)*εxy
0 == Q12(θ)*εxx + Q22(θ)*εyy + Q26(θ)*εxy
0 == Q16(θ)*εxx + Q26(θ)*εyy + Q66(θ)*εxy
Find(εxx, εyy, εxy) → [
    (σxx*Q26(θ)^2 - σxx*Q22(θ)*Q66(θ))/(Q66(θ)*Q12(θ)^2 - 2*Q12(θ)*Q16(θ)*Q26(θ) + Q22(θ)*Q16(θ)^2 + Q11(θ)*Q26(θ)^2 - Q11(θ)*Q22(θ)*Q66(θ));
    (σxx*Q12(θ)*Q66(θ) - σxx*Q16(θ)*Q26(θ))/(Q66(θ)*Q12(θ)^2 - 2*Q12(θ)*Q16(θ)*Q26(θ) + Q22(θ)*Q16(θ)^2 + Q11(θ)*Q26(θ)^2 - Q11(θ)*Q22(θ)*Q66(θ));
    -(σxx*Q12(θ)*Q26(θ) - σxx*Q22(θ)*Q16(θ))/(Q66(θ)*Q12(θ)^2 - 2*Q12(θ)*Q16(θ)*Q26(θ) + Q22(θ)*Q16(θ)^2 + Q11(θ)*Q26(θ)^2 - Q11(θ)*Q22(θ)*Q66(θ))
]
σxx := 115*GPa
# material 7
# włókno Bor | zywica epoksydowa
# rodzaj włókien 1-W
gramatura := 1040*g/m^2
gestosc := 2.76*g/cm^3
E_1 := 204*GPa
ρ := 2*g/cm^3
E_2 := 18.5*GPa
min_war := 0.125*mm
G_12 := 5.59*GPa
v_12 := 0.23
v_21 := E_2*v_12/E_1 = 0.0208578
q_11 := E_1/(1 - v_12*v_21) = 2.04983e11 Pa
q_12 := v_12*E_2/(1 - v_12*v_21) = 4.27551e9 Pa
q_22 := E_2/(1 - v_12*v_21) = 1.85892e10 Pa
q_66 := G_12 = 5590000000 Pa
Q11(θ) := q_11*cos(θ)^4 + 2*(q_12 + 2*q_66)*sin(θ)^2*cos(θ)^2 + q_22*sin(θ)^4
b := 20*mm
X_t := 1260*MPa
X_c := 2500*MPa
t := 2*mm
L := 100*mm
Y_t := 61*MPa
P := 470*N
Y_c := 202*MPa
θ_1 := 30*deg
Ścin := 67*MPa
θ_2 := 75*deg
E_6 := G_12
ε_lc := -X_c/E_1 = -0.0122549
ε_2c := -Y_c/E_2 = -0.0109189
ε_lt := X_t/E_1 = 0.00617647
ε_2t := Y_t/E_2 = 0.0032973
ε_6S := Ścin/E_6 = 0.0119857
θ_3 := θ_2
θ_4 := θ_1
z_0 := -t/2 = -0.001 m
z_1 := z_0 + t/4 = -0.0005 m
z_2 := z_1 + t/4 = 0 m
z_3 := z_2 + t/4 = 0.0005 m
z_4 := z_3 + t/4 = 0.001 m
D_11 := 1/3*(Q11(θ_1)*(z_1^3 - z_0^3) + Q11(θ_2)*(z_2^3 - z_1^3) + Q11(θ_3)*(z_3^3 - z_2^3) + Q11(θ_4)*(z_4^3 - z_3^3))
D_11 = 72.9049 J
x := L/2 = 0.05 m
ε_xx(z) := -z*P/2*x/(b*D_11)
ε_11(θ, z) := cos(θ)^2*ε_xx(z)
ε_22(θ, z) := sin(θ)^2*ε_xx(z)
ε_66(θ, z) := -sin(2*θ)*ε_xx(z)
# kryterium maksymalnych odkształceń
# warstwa 1 | θ_1
# pow. dolna | z_0
ε_lc ≤ ε_11(θ_1, z_0) = 1
ε_11(θ_1, z_0) ≤ ε_lt = 1
ε_2c ≤ ε_22(θ_1, z_0) = 1
ε_22(θ_1, z_0) ≤ ε_2t = 1
|ε_66(θ_1, z_0)| ≤ ε_6S = 1
# pow. górna | z_1
ε_lc ≤ ε_11(θ_1, z_1) = 1
ε_11(θ_1, z_1) ≤ ε_lt = 1
ε_2c ≤ ε_22(θ_1, z_1) = 1
ε_22(θ_1, z_1) ≤ ε_2t = 1
|ε_66(θ_1, z_1)| ≤ ε_6S = 1
# wszędzie 1, nie nastąpi zerwanie
# warstwa 2 | θ_2
# pow. dolna | z_1
ε_lc ≤ ε_11(θ_2, z_1) = 1
ε_11(θ_2, z_1) ≤ ε_lt = 1
ε_2c ≤ ε_22(θ_2, z_1) = 1
ε_22(θ_2, z_1) ≤ ε_2t = 0
|ε_66(θ_2, z_1)| ≤ ε_6S = 1
# pow. górna | z_2
ε_lc ≤ ε_11(θ_2, z_2) = 1
ε_11(θ_2, z_2) ≤ ε_lt = 1
ε_2c ≤ ε_22(θ_2, z_2) = 1
ε_22(θ_2, z_2) ≤ ε_2t = 1
|ε_66(θ_2, z_2)| ≤ ε_6S = 1
# dla ε22 powierzchni dolnej wystąpiło 0, jest możliwe zerwanie
# warstwa 3 | θ_3
# pow. dolna | z_2
ε_lc ≤ ε_11(θ_3, z_2) = 1
ε_11(θ_3, z_2) ≤ ε_lt = 1
ε_2c ≤ ε_22(θ_3, z_2) = 1
ε_22(θ_3, z_2) ≤ ε_2t = 1
|ε_66(θ_3, z_2)| ≤ ε_6S = 1
# pow. górna | z_3
ε_lc ≤ ε_11(θ_3, z_3) = 1
ε_11(θ_3, z_3) ≤ ε_lt = 1
ε_2c ≤ ε_22(θ_3, z_3) = 1
ε_22(θ_3, z_3) ≤ ε_2t = 1
|ε_66(θ_3, z_3)| ≤ ε_6S = 1
# wszędzie 1, nie nastąpi zerwanie
# warstwa 4 | θ_4
# pow. dolna | z_3
ε_lc ≤ ε_11(θ_4, z_3) = 1
ε_11(θ_4, z_3) ≤ ε_lt = 1
ε_2c ≤ ε_22(θ_4, z_3) = 1
ε_22(θ_4, z_3) ≤ ε_2t = 1
|ε_66(θ_4, z_3)| ≤ ε_6S = 1
# pow. górna | z_4
ε_lc ≤ ε_11(θ_4, z_4) = 1
ε_11(θ_4, z_4) ≤ ε_lt = 1
ε_2c ≤ ε_22(θ_4, z_4) = 1
ε_22(θ_4, z_4) ≤ ε_2t = 1
|ε_66(θ_4, z_4)| ≤ ε_6S = 1
# wszędzie 1, nie nastąpi zerwanie
# zniszczyła się warstwa 2, powierzchnia dolna z1, kąt θ2, dla odkształcenia ε_22(θ_2, z_1) ≤ ε_2t
# kryterium maksymalne naprężeń
σ_1(θ, z) := q_11*ε_11(θ, z) + q_12*ε_22(θ, z)
σ_2(θ, z) := q_12*ε_11(θ, z) + q_22*ε_22(θ, z)
σ_6(θ, z) := q_66*ε_66(θ, z)
# warstwa 1 | θ_1
# pow. dolna | z_0
-X_c ≤ σ_1(θ_1, z_0) = 1
σ_1(θ_1, z_0) ≤ X_t = 1
-Y_c ≤ σ_2(θ_1, z_0) = 1
σ_2(θ_1, z_0) ≤ Y_t = 0
|σ_6(θ_1, z_0)| ≤ Ścin = 1
# pow. górna | z_1
-X_c ≤ σ_1(θ_1, z_1) = 1
σ_1(θ_1, z_1) ≤ X_t = 1
-Y_c ≤ σ_2(θ_1, z_1) = 1
σ_2(θ_1, z_1) ≤ Y_t = 1
|σ_6(θ_1, z_1)| ≤ Ścin = 1
# dla σ2 powierzchni dolnej wystąpiło 0, jest możliwe zerwanie
# warstwa 2 | θ_2
# pow. dolna | z_1
-X_c ≤ σ_1(θ_2, z_1) = 1
σ_1(θ_2, z_1) ≤ X_t = 1
-Y_c ≤ σ_2(θ_2, z_1) = 1
σ_2(θ_2, z_1) ≤ Y_t = 0
|σ_6(θ_2, z_1)| ≤ Ścin = 1
# pow. górna | z_2
-X_c ≤ σ_1(θ_2, z_2) = 1
σ_1(θ_2, z_2) ≤ X_t = 1
-Y_c ≤ σ_2(θ_2, z_2) = 1
σ_2(θ_2, z_2) ≤ Y_t = 1
|σ_6(θ_2, z_2)| ≤ Ścin = 1
# dla σ2 powierzchni dolnej wystąpiło 0, jest możliwe zerwanie
# warstwa 3 | θ_3
# pow. dolna | z_2
-X_c ≤ σ_1(θ_3, z_2) = 1
σ_1(θ_3, z_2) ≤ X_t = 1
-Y_c ≤ σ_2(θ_3, z_2) = 1
σ_2(θ_3, z_2) ≤ Y_t = 1
|σ_6(θ_3, z_2)| ≤ Ścin = 1
# pow. górna | z_3
-X_c ≤ σ_1(θ_3, z_3) = 1
σ_1(θ_3, z_3) ≤ X_t = 1
-Y_c ≤ σ_2(θ_3, z_3) = 1
σ_2(θ_3, z_3) ≤ Y_t = 1
|σ_6(θ_3, z_3)| ≤ Ścin = 1
# wszędzie 1, nie nastąpi zerwanie
# warstwa 4 | θ_4
# pow dolna | z_3
-X_c ≤ σ_1(θ_4, z_3) = 1
σ_1(θ_4, z_3) ≤ X_t = 1
-Y_c ≤ σ_2(θ_4, z_3) = 1
σ_2(θ_4, z_3) ≤ Y_t = 1
|σ_6(θ_4, z_3)| ≤ Ścin = 1
# pow górna | z_4
-X_c ≤ σ_1(θ_4, z_4) = 1
σ_1(θ_4, z_4) ≤ X_t = 1
-Y_c ≤ σ_2(θ_4, z_4) = 1
σ_2(θ_4, z_4) ≤ Y_t = 1
|σ_6(θ_4, z_4)| ≤ Ścin = 1
# wszędzie 1, nie nastąpi zerwanie
# zniszczyła się warstwa 1 i 2 na powierzchniach odpowiednio z0 i z1, kąty θ1 i θ2, w obu przypadkach dla odkształcenia σ_2(θ, z) ≤ Y_t
# kryterium kwadratowe hoffmanna
F_xx := 1/(X_t*X_c)
F_yy := 1/(Y_t*Y_c)
F_ss := 1/Ścin^2
F_x := 1/X_t - 1/X_c
F_y := 1/Y_t - 1/Y_c
F_xy := -1/(X_t*X_c)
# warstwa 1 | θ_1
# pow. dolna | z_0
F_xx*σ_1(θ_1, z_0)^2 + 2*F_xy*σ_1(θ_1, z_0)*σ_2(θ_1, z_0) + F_yy*σ_2(θ_1, z_0)^2 + F_ss*σ_6(θ_1, z_0)^2 + F_x*σ_1(θ_1, z_0) + F_y*σ_2(θ_1, z_0) ≤ 1 = 0
# pow. górna | z_1
F_xx*σ_1(θ_1, z_1)^2 + 2*F_xy*σ_1(θ_1, z_1)*σ_2(θ_1, z_1) + F_yy*σ_2(θ_1, z_1)^2 + F_ss*σ_6(θ_1, z_1)^2 + F_x*σ_1(θ_1, z_1) + F_y*σ_2(θ_1, z_1) ≤ 1 = 1
# możliwe zniszczenie dla pow. dolnej
# warstwa 2 | θ_2
# pow. dolna | z_1
F_xx*σ_1(θ_2, z_1)^2 + 2*F_xy*σ_1(θ_2, z_1)*σ_2(θ_2, z_1) + F_yy*σ_2(θ_2, z_1)^2 + F_ss*σ_6(θ_2, z_1)^2 + F_x*σ_1(θ_2, z_1) + F_y*σ_2(θ_2, z_1) ≤ 1 = 0
# pow. górna | z_2
F_xx*σ_1(θ_2, z_2)^2 + 2*F_xy*σ_1(θ_2, z_2)*σ_2(θ_2, z_2) + F_yy*σ_2(θ_2, z_2)^2 + F_ss*σ_6(θ_2, z_2)^2 + F_x*σ_1(θ_2, z_2) + F_y*σ_2(θ_2, z_2) ≤ 1 = 1
# możliwe zniszczenie dla pow. dolnej
# warstwa 3 | θ_3
# pow. dolna | z_2
F_xx*σ_1(θ_3, z_2)^2 + 2*F_xy*σ_1(θ_3, z_2)*σ_2(θ_3, z_2) + F_yy*σ_2(θ_3, z_2)^2 + F_ss*σ_6(θ_3, z_2)^2 + F_x*σ_1(θ_3, z_2) + F_y*σ_2(θ_3, z_2) ≤ 1 = 1
# pow. górna | z_3
F_xx*σ_1(θ_3, z_3)^2 + 2*F_xy*σ_1(θ_3, z_3)*σ_2(θ_3, z_3) + F_yy*σ_2(θ_3, z_3)^2 + F_ss*σ_6(θ_3, z_3)^2 + F_x*σ_1(θ_3, z_3) + F_y*σ_2(θ_3, z_3) ≤ 1 = 1
# wszędzie 1, nie nastąpi zerwanie
# warstwa 4 | θ_4
# pow. dolna | z_3
F_xx*σ_1(θ_4, z_3)^2 + 2*F_xy*σ_1(θ_4, z_3)*σ_2(θ_4, z_3) + F_yy*σ_2(θ_4, z_3)^2 + F_ss*σ_6(θ_4, z_3)^2 + F_x*σ_1(θ_4, z_3) + F_y*σ_2(θ_4, z_3) ≤ 1 = 1
# pow górna | z_4
F_xx*σ_1(θ_4, z_4)^2 + 2*F_xy*σ_1(θ_4, z_4)*σ_2(θ_4, z_4) + F_yy*σ_2(θ_4, z_4)^2 + F_ss*σ_6(θ_4, z_4)^2 + F_x*σ_1(θ_4, z_4) + F_y*σ_2(θ_4, z_4) ≤ 1 = 1
# wszędzie 1, nie nastąpi zerwanie
# zniszczyła się warstwa 1 i 2 na powierzchniach dolnych odpowiednio z0 i z1, kąty θ1 i θ2
# dla kryterium maksymalnych odkształceń zniszczyła się warstwa 2, powierzchnia dolna z1, kąt θ2, dla odkształcenia ε_22(θ_2, z_1) ≤ ε_2t
# dla kryterium maksymalnych naprężeń zniszczyła się warstwa 1 i 2 na powierzchniach dolnych odpowiednio z0 i z1, kąty θ1 i θ2, w obu przypadkach dla odkształcenia σ_2(θ, z) ≤ Y_t
# dla kryterium kwadratowego hoffmanna zniszczyła się warstwa 1 i 2 na powierzchniach dolnych odpowiednio z0 i z1, kąty θ1 i θ2
#
# podsumowując najbardziej podatne na rozerwania są powierzchnie dolne warstw 1 i 2, warstwa druga jest nieco bardziej podatna niż warstwa pierwsza, na co wskazuje kryterium maksymalnych odkształceń
