E_1w := 49066*MPa
v_1w := 0.25
ρw := 2.49*gm/cm^3
E_o := 4100*MPa
v_o := 0.35
ρo := 1.46*gm/cm^3
g = 9.80665 m/s^2
gm = 0.001 kg  # cieżar
F_w == O_w*γw
F_o == O_o*γo
# udział objętościowy
V_w == O_w/O_k
V_o == O_o/O_k
# ciężar właściwy
γw := ρw*g = 24418.6 kg/(m^2*s^2)
γo := ρo*g = 14317.7 kg/(m^2*s^2)
# udział wagowy
W_o == F_o/F_k
W_w == F_w/F_k == O_w*γw/(O_w*γw + O_o*γo) == O_w*γw/(O_w*γw + O_o*γo)  # O_k/O_k
V_w + V_o == 1
W_w == V_w*γw/(V_w*γw + V_o*γo) == V_w*γw/(V_w*γw + (1 - V_w)*γo)
W_w(V_w) := V_w*γw/(V_w*γw + (1 - V_w)*γo)
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W_w(0.45) = 0.582532
W_w(0.75) = 0.836506
Q_ij == Q_ij(E_w, E_o, v_w, v_o, V_w, V_o)
E_1 == E_1w*V_w + E_o*V_o == E_1w*V_w + E_o*(1 - V_w)
E_1(V_w) := E_1w*V_w + E_o*(1 - V_w)
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E_1(0.45) = 24334700000 Pa
E_1(0.75) = 37824500000 Pa
E_2 == E_o*(1 + 2*V_w)/(1 - V_w)
E_2(V_w) := E_o*(1 + 2*V_w)/(1 - V_w)
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E_2(0.45) = 1.41636e10 Pa
E_2(0.75) = 41000000000 Pa
v_12 == v_1w*V_w + v_o*V_o
v_21 == v_12*E_2/E_1
v_12(V_w) := v_1w*V_w + v_o*(1 - V_w)
v_21(V_w) := (v_1w*V_w + v_o*(1 - V_w))*E_o*(1 + 2*V_w)/(1 - V_w)/(E_1w*V_w + E_o*(1 - V_w))
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v_12(0.45) = 0.305
v_21(0.45) = 0.177521
v_12(0.75) = 0.275
v_21(0.75) = 0.298087
# W zależności od wzrostu udziału objętościowego włókna w materiale (Vw) w przedziale 45%-75% moduły Younga E1 i E2 wzrastały, współczynnik Poissona v12 za to malał, a v21 rósł
