d/dx(w0*sin(π*x/a)*sin(π*y/b)) → π*w0*cos(π*x/a)*sin(π*y/b)/a
d^2/dx^2(w0*sin(π*x/a)*sin(π*y/b)) → -π^2*w0*sin(π*x/a)*sin(π*y/b)/a^2
d^3/dx^3(w0*sin(π*x/a)*sin(π*y/b)) → -π^3*w0*cos(π*x/a)*sin(π*y/b)/a^3
d^4/dx^4(-(w0*sin(π*x/a)*sin(π*y/b))) → -π^4*w0*sin(π*x/a)*sin(π*y/b)/a^4
d^2/dx^2(d^1/dy^1(-(w0*sin(π*x/a)*sin(π*y/b)))) → π^3*w0*sin(π*x/a)*cos(π*y/b)/(a^2*b)
d^2/dx^2(d^2/dy^2(w0*sin(π*x/a)*sin(π*y/b))) → π^4*w0*sin(π*x/a)*sin(π*y/b)/(a^2*b^2)
d/dy(w0*sin(π*x/a)*sin(π*y/b)) → π*w0*sin(π*x/a)*cos(π*y/b)/b
d^2/dy^2(w0*sin(π*x/a)*sin(π*y/b)) → -π^2*w0*sin(π*x/a)*sin(π*y/b)/b^2
d^3/dy^3(-(w0*sin(π*x/a)*sin(π*y/b))) → π^3*w0*sin(π*x/a)*cos(π*y/b)/b^3
d^4/dy^4(w0*sin(π*x/a)*sin(π*y/b)) → π^4*w0*sin(π*x/a)*sin(π*y/b)/b^4
Given
D11*(-π^4*w0*sin(π*x/a)*sin(π*y/b)/a^4) + 2*(D12 + 2*D66)*π^4*w0*sin(π*x/a)*sin(π*y/b)/(a^2*b^2) + D22*π^4*w0*sin(π*x/a)*sin(π*y/b)/b^4 == q0*(sin(π*x/a)*sin(π*y/b))
Find(w0) → a^4*b^4*q0/(π^4*D22*a^4 - π^4*D11*b^4 + 2*π^4*D12*a^2*b^2 + 4*π^4*D66*a^2*b^2)
# min (max(w(x,y,θ))
# θi  x,y
# 0 <= x <= a
# 0 <= y <=b
# 0 <= θ <= 90 deg
